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/batch
! ANSYS input file written by Workbench version 19.2 RELEASE
! File used for geometry attach: S:\FILES(imp)\Drive\Biped\CAD\knee_2\ASM_NEW.ASM.1
/title,knee_1--Transient (B5)
/com,--- Data in consistent MKS units. See Solving Units in the help system for more information.
/units,MKS
/prep7
! Turn off shape checking because checks already performed inside WB mesher.
! See help system for more information.
SHPP,OFF,,NOWARN
etcon,set             ! allow ANSYS to choose best KEYOP's for 180x elements
/com,*********** Nodes for the whole assembly ***********
nblock,3,,10739
(1i9,3e20.9e3)
        1     2.499999999E-02     2.794262716E-02    -1.328931486E-11
        2     2.500000000E-02     1.950000000E-01     1.983461463E-16
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-1
/com,*********** Nodes for all Remote Points ***********
nblock,3
(1i9,3e20.9e3)
    56360     3.081900001E-02     1.950000000E-01     1.000000000E-02
    56361     3.081900001E-02     1.950000000E-01     1.000000000E-02
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-1
/com,*********** Elements for Body 1 "KNEE_1_UPPER_1[40]" ***********
/com,*********** Send Body as a Rigid Body ***********
et,1,21
keyo,1,2,1             ! Moments of inertia in nodal coordinates
keyo,1,3,0         ! 3D Mass With Rotary Intertia
r,1,7.70099294799568e-002,7.70099294799568e-002,7.70099294799568e-002,5.94855409230081e-005,4.63790686382859e-005,4.48815914150307e-005
local,11,0,2.49999999897126e-002,2.79426271649602e-002,-1.32893148618514e-011,0.,0.,0.
nrot,1
csys,0
mat,1
real,1
type,1
en,1,1
/com,*********** Elements for Body 2 "KNEE_AXLE_1[51]" ***********
/com,*********** Send Body as a Rigid Body ***********
et,2,21
keyo,2,2,1             ! Moments of inertia in nodal coordinates
keyo,2,3,0         ! 3D Mass With Rotary Intertia
r,2,2.29499940689307e-002,2.29499940689307e-002,2.29499940689307e-002,1.03186815808722e-007,2.0490467906322e-005,2.04904679469123e-005
local,11,0,2.5e-002,2.25e-002,8.69999923706572e-003,90.,0.,90.
nrot,3
csys,0
mat,2
real,2
type,2
en,3,3
/com,*********** Elements for Body 3 "KNEE_1_BEARING_1[63]" ***********
/com,*********** Send Body as a Rigid Body ***********
et,3,21
keyo,3,2,1             ! Moments of inertia in nodal coordinates
keyo,3,3,0         ! 3D Mass With Rotary Intertia
r,3,1.57093769846431e-002,1.57093769846431e-002,1.57093769846431e-002,8.55434742949576e-007,4.91838488690226e-007,4.91838842539145e-007
local,11,0,2.5e-002,2.25e-002,2.80000000000003e-002,90.,0.,90.
nrot,4
csys,0
mat,3
real,3
type,3
en,4,4
/com,*********** Elements for Body 4 "KNEE_1_BEARING_1[64]" ***********
/com,*********** Send Body as a Rigid Body ***********
et,4,21
keyo,4,2,1             ! Moments of inertia in nodal coordinates
keyo,4,3,0         ! 3D Mass With Rotary Intertia
r,4,1.57093769846431e-002,1.57093769846431e-002,1.57093769846431e-002,8.55434742949576e-007,4.91838488690226e-007,4.91838842539145e-007
local,11,0,2.5e-002,2.25e-002,-2.79999999999997e-002,90.,0.,90.
nrot,5
csys,0
mat,4
real,4
type,4
en,5,5
/com,*********** Elements for Body 5 "ALUMINIUM_EXT[77]" ***********
/com,*********** Send Body as a Rigid Body ***********
et,5,21
keyo,5,2,1             ! Moments of inertia in nodal coordinates
keyo,5,3,0         ! 3D Mass With Rotary Intertia
r,5,0.129570555453804,0.129570555453804,0.129570555453804,9.77317766128228e-004,9.77317766128815e-004,1.12203741428715e-005
local,11,0,2.5e-002,0.194999999999985,1.98346146336845e-016,-180.,89.9999999999999,180.
nrot,2
csys,0
mat,5
real,5
type,5
en,2,2
/com,*********** Elements for Body 6 "MOTOR_MOUNT_[84]" ***********
/com,*********** Send Body as a Rigid Body ***********
et,6,21
keyo,6,2,1             ! Moments of inertia in nodal coordinates
keyo,6,3,0         ! 3D Mass With Rotary Intertia
r,6,2.97080995376832e-002,2.97080995376832e-002,2.97080995376832e-002,1.56841534003112e-005,1.45760952237712e-005,6.88662004892796e-006
local,11,0,3.48213141124295e-002,0.175129858018048,6.51209867154955e-003,-179.282936101084,0.638476384523148,-58.397794090042
nrot,7
csys,0
mat,6
real,6
type,6
en,7,7
/com,*********** Elements for Body 7 "MOTOR_MOUNT_EXT_[109]" ***********
/com,*********** Send Body as a Rigid Body ***********
et,7,21
keyo,7,2,1             ! Moments of inertia in nodal coordinates
keyo,7,3,0         ! 3D Mass With Rotary Intertia
r,7,1.44982397109015e-002,1.44982397109015e-002,1.44982397109015e-002,2.29258520904671e-006,5.16686712304223e-006,7.26798837647362e-006
local,11,0,3.64266906971904e-002,0.174991409460569,-2.00219703013896e-002,4.66100289404779e-005,3.4506326011985e-005,7.11929830153872
nrot,9
csys,0
mat,7
real,7
type,7
en,9,9
/com,*********** Elements for Body 8 "KNEE_1_MOTOR_1[89]" ***********
/com,*********** Send Body as a Rigid Body ***********
et,8,21
keyo,8,2,1             ! Moments of inertia in nodal coordinates
keyo,8,3,0         ! 3D Mass With Rotary Intertia
r,8,0.521319867690777,0.521319867690777,0.521319867690777,4.24168856283915e-004,4.23618053643227e-004,6.50688789010836e-005
local,11,0,6.14999999999491e-002,0.17482100775026,-1.77496480069245e-002,-179.999997180219,-0.713731843147085,3.53508993420469e-008
nrot,8
csys,0
mat,8
real,8
type,8
en,8,8
/com,*********** Elements for Body 9 "KNEE_1_AXLE_1[124]" ***********
/com,*********** Send Body as a Rigid Body ***********
et,9,21
keyo,9,2,1             ! Moments of inertia in nodal coordinates
keyo,9,3,0         ! 3D Mass With Rotary Intertia
r,9,2.21953520976119e-002,2.21953520976119e-002,2.21953520976119e-002,9.97938242611111e-008,1.85381271736664e-005,1.8538127212922e-005
local,11,0,4.325e-002,9.52457043405314e-002,6.29999999999409e-003,-104.083360280676,-2.54444374517081e-014,-89.9999999999999
nrot,6
csys,0
mat,9
real,9
type,9
en,6,6
/com,*********** Elements for Body 10 "GEAR_SHAFT_MOUNT_1_[134]" ***********
/com,*********** Send Body as a Rigid Body ***********
et,10,21
keyo,10,2,1             ! Moments of inertia in nodal coordinates
keyo,10,3,0         ! 3D Mass With Rotary Intertia
r,10,1.12414795787767e-002,1.12414795787767e-002,1.12414795787767e-002,1.54717186253551e-006,2.59119228606864e-006,1.83316347046854e-006
local,11,0,2.67200306315354e-002,9.52457034775771e-002,1.12533728469089e-009,6.77262181433464e-006,-2.18063057756597e-009,-1.43366741993719e-006
nrot,10
csys,0
mat,10
real,10
type,10
en,10,10
/com,*********** Elements for Body 11 "GEAR_FINAL_1_[224]" ***********
/com,*********** Send Body as a Rigid Body ***********
et,11,21
keyo,11,2,1             ! Moments of inertia in nodal coordinates
keyo,11,3,0         ! 3D Mass With Rotary Intertia
r,11,1.95592389550038e-002,1.95592389550038e-002,1.95592389550038e-002,3.54122307189937e-006,1.85040695681177e-006,1.85049978583061e-006
local,11,0,6.15000466868005e-002,0.167991348280772,4.97999999999988e-002,37.7024650699261,4.45277655404892e-014,-90.
nrot,5387
csys,0
mat,11
real,11
type,11
en,1931,5387
/com,*********** Elements for Body 12 "GEAR_FINAL_2_[230]" ***********
/com,*********** Send Body as a Rigid Body ***********
et,12,21
keyo,12,2,1             ! Moments of inertia in nodal coordinates
keyo,12,3,0         ! 3D Mass With Rotary Intertia
r,12,0.132697117591708,0.132697117591708,0.132697117591708,2.06947483537797e-004,1.04077112399312e-004,1.03419690312481e-004
local,11,0,4.30576928483392e-002,9.53056060079952e-002,5.07999999981946e-002,72.6987349442228,1.27222187258541e-014,-90.0000000000001
nrot,832
csys,0
mat,12
real,12
type,12
en,587,832
/com,*********** Elements for Body 13 "GEAR_FINAL_1_[233]" ***********
/com,*********** Send Body as a Rigid Body ***********
et,13,21
keyo,13,2,1             ! Moments of inertia in nodal coordinates
keyo,13,3,0         ! 3D Mass With Rotary Intertia
r,13,1.95592389550038e-002,1.95592389550038e-002,1.95592389550038e-002,3.54122307189937e-006,1.85040695681177e-006,1.85049978583061e-006
local,11,0,4.32500739639083e-002,9.52456854409892e-002,4.47999999999987e-002,75.6662701746736,9.54166404439055e-015,-90.0000000000001
nrot,8049
csys,0
mat,13
real,13
type,13
en,2699,8049
/com,*********** Elements for Body 14 "GEAR_FINAL_2_[236]" ***********
/com,*********** Send Body as a Rigid Body ***********
et,14,21
keyo,14,2,1             ! Moments of inertia in nodal coordinates
keyo,14,3,0         ! 3D Mass With Rotary Intertia
r,14,0.132697117591708,0.132697117591708,0.132697117591708,2.06947483537797e-004,1.04077112399312e-004,1.03419690312481e-004
local,11,0,2.50943449639851e-002,2.2677958641587e-002,4.48999999981955e-002,-27.930346244747,1.74930507480493e-014,-90.
nrot,3045
csys,0
mat,14
real,14
type,14
en,1162,3045
/com,*********** Elements for Body 15 "KNEE_LOWER_1[239]" ***********
/com,*********** Send Body as a Rigid Body ***********
et,15,21
keyo,15,2,1             ! Moments of inertia in nodal coordinates
keyo,15,3,0         ! 3D Mass With Rotary Intertia
r,15,9.45829014460664e-002,9.45829014460664e-002,9.45829014460664e-002,1.31582423327523e-004,1.14774890323648e-004,6.97319538832085e-005
local,11,0,2.22347544812196e-002,-4.89583054270469e-003,6.90168247146574e-004,-5.763727761649,0.873252919128075,-8.56797739558739e-009
nrot,4439
csys,0
mat,15
real,15
type,15
en,1163,4439
/com,*********** Elements for Body 16 "KNEE_1_BEARING_1[243]" ***********
/com,*********** Send Body as a Rigid Body ***********
et,16,21
keyo,16,2,1             ! Moments of inertia in nodal coordinates
keyo,16,3,0         ! 3D Mass With Rotary Intertia
r,16,1.57093769846431e-002,1.57093769846431e-002,1.57093769846431e-002,8.55434742949576e-007,4.91838488690226e-007,4.91838842539145e-007
local,11,0,2.5e-002,2.25e-002,-3.81000000000003e-002,4.62562219922644e-002,1.80812927380225e-014,-90.
nrot,11
csys,0
mat,16
real,16
type,16
en,11,11
/com,*********** Elements for Body 17 "KNEE_1_BEARING_1[246]" ***********
/com,*********** Send Body as a Rigid Body ***********
et,17,21
keyo,17,2,1             ! Moments of inertia in nodal coordinates
keyo,17,3,0         ! 3D Mass With Rotary Intertia
r,17,1.57093769846431e-002,1.57093769846431e-002,1.57093769846431e-002,8.55434742949576e-007,4.91838488690226e-007,4.91838842539145e-007
local,11,0,2.5e-002,2.25e-002,3.88999999999996e-002,0.160053971363017,-7.34260865915991e-015,-90.
nrot,12
csys,0
mat,17
real,17
type,17
en,12,12
/com,*********** Send User Defined Coordinate System(s) ***********
local,12,0,3.0819000005722e-002,0.195,1.00000000000002e-002,0.,5.81587141753329e-014,0.
local,13,0,3.5e-002,0.195,-5.81900000572185e-003,0.,0.,90.
local,14,0,6.15e-002,0.167991408681063,4.12998453332298e-002,-7.74147872329725e-039,4.9991383517927e-014,1.27222187258541e-014
local,15,0,4.325e-002,9.52457043405314e-002,6.29999999999905e-003,-2.90887861050944e-037,5.55580531702636e-014,1.22948612104161e-014
local,16,0,4.325e-002,9.52457043405314e-002,6.29999999999905e-003,-2.90887861050944e-037,5.55580531702636e-014,1.22948612104161e-014
local,17,0,2.5e-002,2.25e-002,8.69999923706048e-003,-180.,-1.80938221878813e-014,-180.
local,18,0,2.5e-002,2.25e-002,-3.81e-002,-1.6075373581197e-037,1.80710393690169e-014,1.2707744565513e-014
local,19,0,2.5e-002,2.25e-002,-2.8e-002,-180.,0.,-180.
local,20,0,2.5e-002,2.25e-002,2.8e-002,-180.,0.,-180.
local,21,0,2.5e-002,2.25e-002,3.89e-002,2.78520021034985e-038,-7.37817624388742e-015,1.27221193686581e-014
local,22,0,2.5000008286238e-002,2.250001563694e-002,4.24e-002,-180.,-2.45582684769703e-014,180.
local,23,0,4.3250073938763e-002,9.52456854474144e-002,4.82999999999991e-002,-7.98867870534129e-033,5.93789128708618e-014,-5.32448987443842e-015
local,24,0,3.0819000005722e-002,0.195,-9.9999999999998e-003,-180.,-5.81587141753329e-014,-180.
local,25,0,3.0819000005722e-002,0.195,-9.9999999999998e-003,-180.,-5.81587141753329e-014,-180.
local,26,0,2.5e-002,2.25e-002,8.69999923706048e-003,-180.,-1.80938221878813e-014,-180.
local,27,0,2.5e-002,2.25e-002,8.69999923706048e-003,-180.,-1.80938221878813e-014,-180.
local,28,0,2.5e-002,2.25e-002,8.69999923706048e-003,-180.,-1.80938221878813e-014,-180.
local,29,0,2.5e-002,2.25e-002,8.69999923706048e-003,-180.,-1.80938221878813e-014,-180.
local,30,0,3.23967133144055e-002,0.194991408681063,5.73551237983812e-003,8.40604879089129e-024,-89.9999999999999,-1.20532280827686e-014
local,31,0,4.e-002,0.174991408681063,-2.24999999999982e-003,1.20532280911747e-014,2.67635426957618e-030,90.
local,32,0,4.4363839300393e-002,9.52457069367581e-002,4.9999996858491e-003,-180.,0.,-180.
csys,0
toffst,273.15,  ! Temperature offset from absolute zero
/com,*********** Set Reference Temperature ***********
tref,22.
/com,*********** Send Materials ***********
MP,DENS,1,1040,	! kg m^-3
MP,EX,1,2390000000,	! Pa
MP,NUXY,1,0.399,
MP,KXX,1,0.258,	! W m^-1 C^-1
MP,C,1,1720,	! J kg^-1 C^-1
MP,RSVX,1,99500000000000,	! kg m^3 A^-2 s^-3

Temperature = 'TEMP' ! Temperature
MP,DENS,2,7850,	! kg m^-3
MP,C,2,434,	! J kg^-1 C^-1
MP,KXX,2,60.5,	! W m^-1 C^-1
MP,RSVX,2,1.7e-07,	! kg m^3 A^-2 s^-3
MP,EX,2,200000000000,	! Pa
MP,NUXY,2,0.3,
MP,MURX,2,10000,

Temperature = 'TEMP' ! Temperature
MP,DENS,3,7850,	! kg m^-3
MP,C,3,434,	! J kg^-1 C^-1
MP,KXX,3,60.5,	! W m^-1 C^-1
MP,RSVX,3,1.7e-07,	! kg m^3 A^-2 s^-3
MP,EX,3,200000000000,	! Pa
MP,NUXY,3,0.3,
MP,MURX,3,10000,

Temperature = 'TEMP' ! Temperature
MP,DENS,4,7850,	! kg m^-3
MP,C,4,434,	! J kg^-1 C^-1
MP,KXX,4,60.5,	! W m^-1 C^-1
MP,RSVX,4,1.7e-07,	! kg m^3 A^-2 s^-3
MP,EX,4,200000000000,	! Pa
MP,NUXY,4,0.3,
MP,MURX,4,10000,

MP,DENS,5,2710,	! kg m^-3
MP,EX,5,68300000000,	! Pa
MP,NUXY,5,0.33,
MP,KXX,5,160,	! W m^-1 C^-1
MP,C,5,896,	! J kg^-1 C^-1
MP,RSVX,5,4e-08,	! kg m^3 A^-2 s^-3

MP,DENS,6,1040,	! kg m^-3
MP,EX,6,2390000000,	! Pa
MP,NUXY,6,0.399,
MP,KXX,6,0.258,	! W m^-1 C^-1
MP,C,6,1720,	! J kg^-1 C^-1
MP,RSVX,6,99500000000000,	! kg m^3 A^-2 s^-3

MP,DENS,7,1040,	! kg m^-3
MP,EX,7,2390000000,	! Pa
MP,NUXY,7,0.399,
MP,KXX,7,0.258,	! W m^-1 C^-1
MP,C,7,1720,	! J kg^-1 C^-1
MP,RSVX,7,99500000000000,	! kg m^3 A^-2 s^-3

Temperature = 'TEMP' ! Temperature
MP,DENS,8,7850,	! kg m^-3
MP,C,8,434,	! J kg^-1 C^-1
MP,KXX,8,60.5,	! W m^-1 C^-1
MP,RSVX,8,1.7e-07,	! kg m^3 A^-2 s^-3
MP,EX,8,200000000000,	! Pa
MP,NUXY,8,0.3,
MP,MURX,8,10000,

Temperature = 'TEMP' ! Temperature
MP,DENS,9,7850,	! kg m^-3
MP,C,9,434,	! J kg^-1 C^-1
MP,KXX,9,60.5,	! W m^-1 C^-1
MP,RSVX,9,1.7e-07,	! kg m^3 A^-2 s^-3
MP,EX,9,200000000000,	! Pa
MP,NUXY,9,0.3,
MP,MURX,9,10000,

MP,DENS,10,1040,	! kg m^-3
MP,EX,10,2390000000,	! Pa
MP,NUXY,10,0.399,
MP,KXX,10,0.258,	! W m^-1 C^-1
MP,C,10,1720,	! J kg^-1 C^-1
MP,RSVX,10,99500000000000,	! kg m^3 A^-2 s^-3

MP,DENS,11,2710,	! kg m^-3
MP,EX,11,68300000000,	! Pa
MP,NUXY,11,0.33,
MP,KXX,11,160,	! W m^-1 C^-1
MP,C,11,896,	! J kg^-1 C^-1
MP,RSVX,11,4e-08,	! kg m^3 A^-2 s^-3

MP,DENS,12,2710,	! kg m^-3
MP,EX,12,68300000000,	! Pa
MP,NUXY,12,0.33,
MP,KXX,12,160,	! W m^-1 C^-1
MP,C,12,896,	! J kg^-1 C^-1
MP,RSVX,12,4e-08,	! kg m^3 A^-2 s^-3

MP,DENS,13,2710,	! kg m^-3
MP,EX,13,68300000000,	! Pa
MP,NUXY,13,0.33,
MP,KXX,13,160,	! W m^-1 C^-1
MP,C,13,896,	! J kg^-1 C^-1
MP,RSVX,13,4e-08,	! kg m^3 A^-2 s^-3

MP,DENS,14,2710,	! kg m^-3
MP,EX,14,68300000000,	! Pa
MP,NUXY,14,0.33,
MP,KXX,14,160,	! W m^-1 C^-1
MP,C,14,896,	! J kg^-1 C^-1
MP,RSVX,14,4e-08,	! kg m^3 A^-2 s^-3

MP,DENS,15,1040,	! kg m^-3
MP,EX,15,2390000000,	! Pa
MP,NUXY,15,0.399,
MP,KXX,15,0.258,	! W m^-1 C^-1
MP,C,15,1720,	! J kg^-1 C^-1
MP,RSVX,15,99500000000000,	! kg m^3 A^-2 s^-3

Temperature = 'TEMP' ! Temperature
MP,DENS,16,7850,	! kg m^-3
MP,C,16,434,	! J kg^-1 C^-1
MP,KXX,16,60.5,	! W m^-1 C^-1
MP,RSVX,16,1.7e-07,	! kg m^3 A^-2 s^-3
MP,EX,16,200000000000,	! Pa
MP,NUXY,16,0.3,
MP,MURX,16,10000,

Temperature = 'TEMP' ! Temperature
MP,DENS,17,7850,	! kg m^-3
MP,C,17,434,	! J kg^-1 C^-1
MP,KXX,17,60.5,	! W m^-1 C^-1
MP,RSVX,17,1.7e-07,	! kg m^3 A^-2 s^-3
MP,EX,17,200000000000,	! Pa
MP,NUXY,17,0.3,
MP,MURX,17,10000,

!************************* Model Summary ********************
!KNEE_1_UPPER_1[40],	ABS plastic,	matid,	1
!KNEE_AXLE_1[51],	Structural Steel,	matid,	2
!KNEE_1_BEARING_1[63],	Structural Steel,	matid,	3
!KNEE_1_BEARING_1[64],	Structural Steel,	matid,	4
!ALUMINIUM_EXT[77],	Aluminum alloy, wrought,	matid,	5
!MOTOR_MOUNT_[84],	ABS plastic,	matid,	6
!MOTOR_MOUNT_EXT_[109],	ABS plastic,	matid,	7
!KNEE_1_MOTOR_1[89],	Structural Steel,	matid,	8
!KNEE_1_AXLE_1[124],	Structural Steel,	matid,	9
!GEAR_SHAFT_MOUNT_1_[134],	ABS plastic,	matid,	10
!GEAR_FINAL_1_[224],	Aluminum alloy, wrought,	matid,	11
!GEAR_FINAL_2_[230],	Aluminum alloy, wrought,	matid,	12
!GEAR_FINAL_1_[233],	Aluminum alloy, wrought,	matid,	13
!GEAR_FINAL_2_[236],	Aluminum alloy, wrought,	matid,	14
!KNEE_LOWER_1[239],	ABS plastic,	matid,	15
!KNEE_1_BEARING_1[243],	Structural Steel,	matid,	16
!KNEE_1_BEARING_1[246],	Structural Steel,	matid,	17
!************************* End Model Summary ********************
/com,*********** Create Contact "Frictional - GEAR_FINAL_1_[224] To GEAR_FINAL_2_[230]" ***********
! ********* Create Contact to Connect To Rigid Body Mass Node ***********
*set,tid,18
*set,cid,18
et,tid,170
keyo,tid,2,1           ! Set MPC target element and not fix pilot
keyo,tid,4,0           ! Create CE's for all DOFs
type,tid
mat ,cid
real,cid
tshape,pilo
en,15835,5387
tshape
! ********* End of Create Contact to Connect To Rigid Body Mass Node ***********
! ******--- Create Insulation Layer on Rigid Body for Surface BC's ---********
eblock,10,,,767
(15i9)
    15836       18       18       18        0     5378     5372     5374     5377     7081     7080     7089     7093
    15837       18       18       18        0     5374     5372     5379     5376     7080     7082     7092     7088
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-1
! ******--- End Create Insulation Layer on Rigid Body for Surface BC's ---********
! ********* Create Contact to Connect To Rigid Body Mass Node ***********
*set,tid,19
*set,cid,19
et,tid,170
keyo,tid,2,1           ! Set MPC target element and not fix pilot
keyo,tid,4,0           ! Create CE's for all DOFs
type,tid
mat ,cid
real,cid
tshape,pilo
en,16603,832
tshape
! ********* End of Create Contact to Connect To Rigid Body Mass Node ***********
! ******--- Create Insulation Layer on Rigid Body for Surface BC's ---********
eblock,10,,,574
(15i9)
    16604       19       19       19        0      829      831      790      790     2225     2170      790     2169
    16605       19       19       19        0      790      791      830      829     2167     2172     2224     2169
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-1
! ******--- End Create Insulation Layer on Rigid Body for Surface BC's ---********
*set,tid,21
*set,cid,20
r,tid
r,cid
et,tid,170
et,cid,174
eblock,10,,,767
(15i9)
    17178       20       20       20        0     5378     5372     5374     5377     7081     7080     7089     7093
    17179       20       20       20        0     5374     5372     5379     5376     7080     7082     7092     7088
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-1
eblock,10,,,574
(15i9)
    17945       21       20       21        0      829      831      790      790     2225     2170      790     2169
    17946       21       20       21        0      790      791      830      829     2167     2172     2224     2169
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-1
! ******--- Create Pilot Element For Rigid Targets ---********
mat,20
real,20
type,21
tshape,pilo
en,18519,832
tshape
! ******--- End Create Pilot Element For Rigid Targets ---********
keyo,tid,2,1               ! Don't fix the pilot node since scoped to rigid body
keyo,cid,10,1              ! Never adjust contact stiffness each NR iteration (from Program Controlled setting due to all Rigid bodies)
keyo,cid,12,0              ! standard contact
mp,mu,cid,0.1       ! unitless
keyo,cid,2,1               ! penalty function only (from Program Controlled setting)
keyo,cid,4,0               ! on Gauss point (from Program Controlled setting)
keyo,cid,9,1               ! ignore initial gaps/penetration
keyo,cid,5,1               ! auto CNOF adjustment to close geometric gap only
keyo,cid,7,0               ! No Prediction
rmod,cid,3,1.       ! FKN
rmod,cid,5,0.       ! ICONT
rmod,cid,6,0.       ! PINB
rmod,cid,10,0.      ! CNOF
rmod,cid,12,0.      ! FKT
rmod,cid,36,117     ! WB DSID
mp,ex,cid,68300000000.        ! EX of underlying rigid body
/com,*********** Create Contact "Frictional - GEAR_FINAL_1_[233] To GEAR_FINAL_2_[236]" ***********
! ********* Create Contact to Connect To Rigid Body Mass Node ***********
*set,tid,22
*set,cid,22
et,tid,170
keyo,tid,2,1           ! Set MPC target element and not fix pilot
keyo,tid,4,0           ! Create CE's for all DOFs
type,tid
mat ,cid
real,cid
tshape,pilo
en,18520,8049
tshape
! ********* End of Create Contact to Connect To Rigid Body Mass Node ***********
! ******--- Create Insulation Layer on Rigid Body for Surface BC's ---********
eblock,10,,,767
(15i9)
    18521       22       22       22        0     8040     8034     8036     8039     9743     9742     9751     9755
    18522       22       22       22        0     8036     8034     8041     8038     9742     9744     9754     9750
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-1
! ******--- End Create Insulation Layer on Rigid Body for Surface BC's ---********
! ********* Create Contact to Connect To Rigid Body Mass Node ***********
*set,tid,23
*set,cid,23
et,tid,170
keyo,tid,2,1           ! Set MPC target element and not fix pilot
keyo,tid,4,0           ! Create CE's for all DOFs
type,tid
mat ,cid
real,cid
tshape,pilo
en,19288,3045
tshape
! ********* End of Create Contact to Connect To Rigid Body Mass Node ***********
! ******--- Create Insulation Layer on Rigid Body for Surface BC's ---********
eblock,10,,,574
(15i9)
    19289       23       23       23        0     3042     3044     3003     3003     4438     4383     3003     4382
    19290       23       23       23        0     3003     3004     3043     3042     4380     4385     4437     4382
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-1
! ******--- End Create Insulation Layer on Rigid Body for Surface BC's ---********
*set,tid,25
*set,cid,24
r,tid
r,cid
et,tid,170
et,cid,174
eblock,10,,,767
(15i9)
    19863       24       24       24        0     8040     8034     8036     8039     9743     9742     9751     9755
    19864       24       24       24        0     8036     8034     8041     8038     9742     9744     9754     9750
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-1
eblock,10,,,574
(15i9)
    20630       25       24       25        0     3042     3044     3003     3003     4438     4383     3003     4382
    20631       25       24       25        0     3003     3004     3043     3042     4380     4385     4437     4382
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-1
! ******--- Create Pilot Element For Rigid Targets ---********
mat,24
real,24
type,25
tshape,pilo
en,21204,3045
tshape
! ******--- End Create Pilot Element For Rigid Targets ---********
keyo,tid,2,1               ! Don't fix the pilot node since scoped to rigid body
keyo,cid,10,1              ! Never adjust contact stiffness each NR iteration (from Program Controlled setting due to all Rigid bodies)
keyo,cid,12,0              ! standard contact
mp,mu,cid,0.1       ! unitless
keyo,cid,2,1               ! penalty function only (from Program Controlled setting)
keyo,cid,4,0               ! on Gauss point (from Program Controlled setting)
keyo,cid,9,1               ! ignore initial gaps/penetration
keyo,cid,5,1               ! auto CNOF adjustment to close geometric gap only
keyo,cid,7,0               ! No Prediction
rmod,cid,3,1.       ! FKN
rmod,cid,5,0.       ! ICONT
rmod,cid,6,0.       ! PINB
rmod,cid,10,0.      ! CNOF
rmod,cid,12,0.      ! FKT
rmod,cid,36,167     ! WB DSID
mp,ex,cid,68300000000.        ! EX of underlying rigid body
nsel,all
esel,all
/com,*********** Create Remote Point "Internal Remote Point 2" ***********
! -------- Remote Point Used by "Fixed - Ground To ALUMINIUM_EXT[77]" --------
! ********* Create Contact to Connect To Rigid Body Mass Node ***********
*set,tid,26
*set,cid,26
et,tid,170
keyo,tid,2,1           ! Set MPC target element and not fix pilot
keyo,tid,4,0           ! Create CE's for all DOFs
type,tid
mat ,cid
real,cid
tshape,pilo
en,21205,2
tshape
! ********* End of Create Contact to Connect To Rigid Body Mass Node ***********
*set,_npilot,56361
_npilot147=_npilot
mat,26
real,26
type,26
en,21206,2,56361
/com,*********** Create Remote Point "Internal Remote Point 3" ***********
! -------- Remote Point Used by "Fixed - ALUMINIUM_EXT[77] To MOTOR_MOUNT_[84]" --------
*set,_npilot,56362
_npilot153=_npilot
mat,26
real,26
type,26
en,21207,2,56362
csys,13
nrot,56362
csys,0
/com,*********** Create Remote Point "Internal Remote Point 4" ***********
! -------- Remote Point Used by "Fixed - ALUMINIUM_EXT[77] To MOTOR_MOUNT_[84]" --------
! ********* Create Contact to Connect To Rigid Body Mass Node ***********
*set,tid,27
*set,cid,27
et,tid,170
keyo,tid,2,1           ! Set MPC target element and not fix pilot
keyo,tid,4,0           ! Create CE's for all DOFs
type,tid
mat ,cid
real,cid
tshape,pilo
en,21208,7
tshape
! ********* End of Create Contact to Connect To Rigid Body Mass Node ***********
*set,_npilot,56363
_npilot154=_npilot
mat,27
real,27
type,27
en,21209,7,56363
csys,13
nrot,56363
csys,0
/com,*********** Create Remote Point "Internal Remote Point 5" ***********
! -------- Remote Point Used by "Revolute - KNEE_1_MOTOR_1[89] To GEAR_FINAL_1_[224]" --------
! ********* Create Contact to Connect To Rigid Body Mass Node ***********
*set,tid,28
*set,cid,28
et,tid,170
keyo,tid,2,1           ! Set MPC target element and not fix pilot
keyo,tid,4,0           ! Create CE's for all DOFs
type,tid
mat ,cid
real,cid
tshape,pilo
en,21210,8
tshape
! ********* End of Create Contact to Connect To Rigid Body Mass Node ***********
*set,_npilot,56364
_npilot171=_npilot
mat,28
real,28
type,28
en,21211,8,56364
/com,*********** Create Remote Point "Internal Remote Point 6" ***********
! -------- Remote Point Used by "Revolute - KNEE_1_MOTOR_1[89] To GEAR_FINAL_1_[224]" --------
*set,_npilot,56365
_npilot172=_npilot
mat,18
real,18
type,18
en,21212,5387,56365
/com,*********** Create Remote Point "Internal Remote Point 7" ***********
! -------- Remote Point Used by "Revolute - KNEE_1_AXLE_1[124] To GEAR_FINAL_1_[233]" --------
! ********* Create Contact to Connect To Rigid Body Mass Node ***********
*set,tid,29
*set,cid,29
et,tid,170
keyo,tid,2,1           ! Set MPC target element and not fix pilot
keyo,tid,4,0           ! Create CE's for all DOFs
type,tid
mat ,cid
real,cid
tshape,pilo
en,21213,6
tshape
! ********* End of Create Contact to Connect To Rigid Body Mass Node ***********
*set,_npilot,56366
_npilot179=_npilot
mat,29
real,29
type,29
en,21214,6,56366
/com,*********** Create Remote Point "Internal Remote Point 8" ***********
! -------- Remote Point Used by "Revolute - KNEE_1_AXLE_1[124] To GEAR_FINAL_1_[233]" --------
*set,_npilot,56367
_npilot180=_npilot
mat,22
real,22
type,22
en,21215,8049,56367
/com,*********** Create Remote Point "Internal Remote Point 9" ***********
! -------- Remote Point Used by "Revolute - KNEE_1_AXLE_1[124] To GEAR_FINAL_2_[230]" --------
*set,_npilot,56368
_npilot187=_npilot
mat,29
real,29
type,29
en,21216,6,56368
/com,*********** Create Remote Point "Internal Remote Point 10" ***********
! -------- Remote Point Used by "Revolute - KNEE_1_AXLE_1[124] To GEAR_FINAL_2_[230]" --------
*set,_npilot,56369
_npilot188=_npilot
mat,19
real,19
type,19
en,21217,832,56369
/com,*********** Create Remote Point "Internal Remote Point 11" ***********
! -------- Remote Point Used by "Revolute - KNEE_AXLE_1[51] To GEAR_FINAL_2_[236]" --------
! ********* Create Contact to Connect To Rigid Body Mass Node ***********
*set,tid,30
*set,cid,30
et,tid,170
keyo,tid,2,1           ! Set MPC target element and not fix pilot
keyo,tid,4,0           ! Create CE's for all DOFs
type,tid
mat ,cid
real,cid
tshape,pilo
en,21218,3
tshape
! ********* End of Create Contact to Connect To Rigid Body Mass Node ***********
*set,_npilot,56370
_npilot195=_npilot
mat,30
real,30
type,30
en,21219,3,56370
csys,17
nrot,56370
csys,0
/com,*********** Create Remote Point "Internal Remote Point 12" ***********
! -------- Remote Point Used by "Revolute - KNEE_AXLE_1[51] To GEAR_FINAL_2_[236]" --------
*set,_npilot,56371
_npilot196=_npilot
mat,23
real,23
type,23
en,21220,3045,56371
csys,17
nrot,56371
csys,0
/com,*********** Create Remote Point "Internal Remote Point 13" ***********
! -------- Remote Point Used by "Revolute - KNEE_1_BEARING_1[243] To KNEE_LOWER_1[239]" --------
! ********* Create Contact to Connect To Rigid Body Mass Node ***********
*set,tid,31
*set,cid,31
et,tid,170
keyo,tid,2,1           ! Set MPC target element and not fix pilot
keyo,tid,4,0           ! Create CE's for all DOFs
type,tid
mat ,cid
real,cid
tshape,pilo
en,21221,11
tshape
! ********* End of Create Contact to Connect To Rigid Body Mass Node ***********
*set,_npilot,56372
_npilot203=_npilot
mat,31
real,31
type,31
en,21222,11,56372
/com,*********** Create Remote Point "Internal Remote Point 14" ***********
! -------- Remote Point Used by "Revolute - KNEE_1_BEARING_1[243] To KNEE_LOWER_1[239]" --------
! ********* Create Contact to Connect To Rigid Body Mass Node ***********
*set,tid,32
*set,cid,32
et,tid,170
keyo,tid,2,1           ! Set MPC target element and not fix pilot
keyo,tid,4,0           ! Create CE's for all DOFs
type,tid
mat ,cid
real,cid
tshape,pilo
en,21223,4439
tshape
! ********* End of Create Contact to Connect To Rigid Body Mass Node ***********
*set,_npilot,56373
_npilot204=_npilot
mat,32
real,32
type,32
en,21224,4439,56373
/com,*********** Create Remote Point "Internal Remote Point 15" ***********
! -------- Remote Point Used by "Revolute - KNEE_1_BEARING_1[64] To KNEE_1_UPPER_1[40]" --------
! ********* Create Contact to Connect To Rigid Body Mass Node ***********
*set,tid,33
*set,cid,33
et,tid,170
keyo,tid,2,1           ! Set MPC target element and not fix pilot
keyo,tid,4,0           ! Create CE's for all DOFs
type,tid
mat ,cid
real,cid
tshape,pilo
en,21225,5
tshape
! ********* End of Create Contact to Connect To Rigid Body Mass Node ***********
*set,_npilot,56374
_npilot211=_npilot
mat,33
real,33
type,33
en,21226,5,56374
csys,19
nrot,56374
csys,0
/com,*********** Create Remote Point "Internal Remote Point 16" ***********
! -------- Remote Point Used by "Revolute - KNEE_1_BEARING_1[64] To KNEE_1_UPPER_1[40]" --------
! ********* Create Contact to Connect To Rigid Body Mass Node ***********
*set,tid,34
*set,cid,34
et,tid,170
keyo,tid,2,1           ! Set MPC target element and not fix pilot
keyo,tid,4,0           ! Create CE's for all DOFs
type,tid
mat ,cid
real,cid
tshape,pilo
en,21227,1
tshape
! ********* End of Create Contact to Connect To Rigid Body Mass Node ***********
*set,_npilot,56375
_npilot212=_npilot
mat,34
real,34
type,34
en,21228,1,56375
csys,19
nrot,56375
csys,0
/com,*********** Create Remote Point "Internal Remote Point 17" ***********
! -------- Remote Point Used by "Revolute - KNEE_1_BEARING_1[63] To KNEE_1_UPPER_1[40]" --------
! ********* Create Contact to Connect To Rigid Body Mass Node ***********
*set,tid,35
*set,cid,35
et,tid,170
keyo,tid,2,1           ! Set MPC target element and not fix pilot
keyo,tid,4,0           ! Create CE's for all DOFs
type,tid
mat ,cid
real,cid
tshape,pilo
en,21229,4
tshape
! ********* End of Create Contact to Connect To Rigid Body Mass Node ***********
*set,_npilot,56376
_npilot219=_npilot
mat,35
real,35
type,35
en,21230,4,56376
csys,20
nrot,56376
csys,0
/com,*********** Create Remote Point "Internal Remote Point 18" ***********
! -------- Remote Point Used by "Revolute - KNEE_1_BEARING_1[63] To KNEE_1_UPPER_1[40]" --------
*set,_npilot,56377
_npilot220=_npilot
mat,34
real,34
type,34
en,21231,1,56377
csys,20
nrot,56377
csys,0
/com,*********** Create Remote Point "Internal Remote Point 19" ***********
! -------- Remote Point Used by "Revolute - KNEE_1_BEARING_1[246] To KNEE_LOWER_1[239]" --------
! ********* Create Contact to Connect To Rigid Body Mass Node ***********
*set,tid,36
*set,cid,36
et,tid,170
keyo,tid,2,1           ! Set MPC target element and not fix pilot
keyo,tid,4,0           ! Create CE's for all DOFs
type,tid
mat ,cid
real,cid
tshape,pilo
en,21232,12
tshape
! ********* End of Create Contact to Connect To Rigid Body Mass Node ***********
*set,_npilot,56378
_npilot227=_npilot
mat,36
real,36
type,36
en,21233,12,56378
/com,*********** Create Remote Point "Internal Remote Point 20" ***********
! -------- Remote Point Used by "Revolute - KNEE_1_BEARING_1[246] To KNEE_LOWER_1[239]" --------
*set,_npilot,56379
_npilot228=_npilot
mat,32
real,32
type,32
en,21234,4439,56379
/com,*********** Create Remote Point "Internal Remote Point 21" ***********
! -------- Remote Point Used by "Fixed - GEAR_FINAL_2_[236] To KNEE_LOWER_1[239]" --------
*set,_npilot,56380
_npilot235=_npilot
mat,23
real,23
type,23
en,21235,3045,56380
csys,22
nrot,56380
csys,0
/com,*********** Create Remote Point "Internal Remote Point 22" ***********
! -------- Remote Point Used by "Fixed - GEAR_FINAL_2_[236] To KNEE_LOWER_1[239]" --------
*set,_npilot,56381
_npilot236=_npilot
mat,32
real,32
type,32
en,21236,4439,56381
csys,22
nrot,56381
csys,0
/com,*********** Create Remote Point "Internal Remote Point 23" ***********
! -------- Remote Point Used by "Fixed - GEAR_FINAL_1_[233] To GEAR_FINAL_2_[230]" --------
*set,_npilot,56382
_npilot243=_npilot
mat,22
real,22
type,22
en,21237,8049,56382
/com,*********** Create Remote Point "Internal Remote Point 24" ***********
! -------- Remote Point Used by "Fixed - GEAR_FINAL_1_[233] To GEAR_FINAL_2_[230]" --------
*set,_npilot,56383
_npilot244=_npilot
mat,19
real,19
type,19
en,21238,832,56383
/com,*********** Create Remote Point "Internal Remote Point 25" ***********
! -------- Remote Point Used by "Fixed - ALUMINIUM_EXT[77] To GEAR_SHAFT_MOUNT_1_[134]" --------
*set,_npilot,56384
_npilot251=_npilot
mat,26
real,26
type,26
en,21239,2,56384
csys,24
nrot,56384
csys,0
/com,*********** Create Remote Point "Internal Remote Point 26" ***********
! -------- Remote Point Used by "Fixed - ALUMINIUM_EXT[77] To GEAR_SHAFT_MOUNT_1_[134]" --------
! ********* Create Contact to Connect To Rigid Body Mass Node ***********
*set,tid,37
*set,cid,37
et,tid,170
keyo,tid,2,1           ! Set MPC target element and not fix pilot
keyo,tid,4,0           ! Create CE's for all DOFs
type,tid
mat ,cid
real,cid
tshape,pilo
en,21240,10
tshape
! ********* End of Create Contact to Connect To Rigid Body Mass Node ***********
*set,_npilot,56385
_npilot252=_npilot
mat,37
real,37
type,37
en,21241,10,56385
csys,24
nrot,56385
csys,0
/com,*********** Create Remote Point "Internal Remote Point 27" ***********
! -------- Remote Point Used by "Fixed - ALUMINIUM_EXT[77] To KNEE_1_UPPER_1[40]" --------
*set,_npilot,56386
_npilot259=_npilot
mat,26
real,26
type,26
en,21242,2,56386
csys,25
nrot,56386
csys,0
/com,*********** Create Remote Point "Internal Remote Point 28" ***********
! -------- Remote Point Used by "Fixed - ALUMINIUM_EXT[77] To KNEE_1_UPPER_1[40]" --------
*set,_npilot,56387
_npilot260=_npilot
mat,34
real,34
type,34
en,21243,1,56387
csys,25
nrot,56387
csys,0
/com,*********** Create Remote Point "Internal Remote Point 29" ***********
! -------- Remote Point Used by "Fixed - KNEE_AXLE_1[51] To KNEE_1_BEARING_1[63]" --------
*set,_npilot,56388
_npilot267=_npilot
mat,30
real,30
type,30
en,21244,3,56388
csys,26
nrot,56388
csys,0
/com,*********** Create Remote Point "Internal Remote Point 30" ***********
! -------- Remote Point Used by "Fixed - KNEE_AXLE_1[51] To KNEE_1_BEARING_1[63]" --------
*set,_npilot,56389
_npilot268=_npilot
mat,35
real,35
type,35
en,21245,4,56389
csys,26
nrot,56389
csys,0
/com,*********** Create Remote Point "Internal Remote Point 31" ***********
! -------- Remote Point Used by "Fixed - KNEE_AXLE_1[51] To KNEE_1_BEARING_1[64]" --------
*set,_npilot,56390
_npilot275=_npilot
mat,30
real,30
type,30
en,21246,3,56390
csys,27
nrot,56390
csys,0
/com,*********** Create Remote Point "Internal Remote Point 32" ***********
! -------- Remote Point Used by "Fixed - KNEE_AXLE_1[51] To KNEE_1_BEARING_1[64]" --------
*set,_npilot,56391
_npilot276=_npilot
mat,33
real,33
type,33
en,21247,5,56391
csys,27
nrot,56391
csys,0
/com,*********** Create Remote Point "Internal Remote Point 33" ***********
! -------- Remote Point Used by "Fixed - KNEE_AXLE_1[51] To KNEE_1_BEARING_1[243]" --------
*set,_npilot,56392
_npilot283=_npilot
mat,30
real,30
type,30
en,21248,3,56392
csys,28
nrot,56392
csys,0
/com,*********** Create Remote Point "Internal Remote Point 34" ***********
! -------- Remote Point Used by "Fixed - KNEE_AXLE_1[51] To KNEE_1_BEARING_1[243]" --------
*set,_npilot,56393
_npilot284=_npilot
mat,31
real,31
type,31
en,21249,11,56393
csys,28
nrot,56393
csys,0
/com,*********** Create Remote Point "Internal Remote Point 35" ***********
! -------- Remote Point Used by "Fixed - KNEE_AXLE_1[51] To KNEE_1_BEARING_1[246]" --------
*set,_npilot,56394
_npilot291=_npilot
mat,30
real,30
type,30
en,21250,3,56394
csys,29
nrot,56394
csys,0
/com,*********** Create Remote Point "Internal Remote Point 36" ***********
! -------- Remote Point Used by "Fixed - KNEE_AXLE_1[51] To KNEE_1_BEARING_1[246]" --------
*set,_npilot,56395
_npilot292=_npilot
mat,36
real,36
type,36
en,21251,12,56395
csys,29
nrot,56395
csys,0
/com,*********** Create Remote Point "Internal Remote Point 37" ***********
! -------- Remote Point Used by "Fixed - MOTOR_MOUNT_[84] To MOTOR_MOUNT_EXT_[109]" --------
*set,_npilot,56396
_npilot299=_npilot
mat,27
real,27
type,27
en,21252,7,56396
csys,30
nrot,56396
csys,0
/com,*********** Create Remote Point "Internal Remote Point 38" ***********
! -------- Remote Point Used by "Fixed - MOTOR_MOUNT_[84] To MOTOR_MOUNT_EXT_[109]" --------
! ********* Create Contact to Connect To Rigid Body Mass Node ***********
*set,tid,38
*set,cid,38
et,tid,170
keyo,tid,2,1           ! Set MPC target element and not fix pilot
keyo,tid,4,0           ! Create CE's for all DOFs
type,tid
mat ,cid
real,cid
tshape,pilo
en,21253,9
tshape
! ********* End of Create Contact to Connect To Rigid Body Mass Node ***********
*set,_npilot,56397
_npilot300=_npilot
mat,38
real,38
type,38
en,21254,9,56397
csys,30
nrot,56397
csys,0
/com,*********** Create Remote Point "Internal Remote Point 39" ***********
! -------- Remote Point Used by "Fixed - MOTOR_MOUNT_[84] To KNEE_1_MOTOR_1[89]" --------
*set,_npilot,56398
_npilot406=_npilot
mat,27
real,27
type,27
en,21255,7,56398
csys,31
nrot,56398
csys,0
/com,*********** Create Remote Point "Internal Remote Point 40" ***********
! -------- Remote Point Used by "Fixed - MOTOR_MOUNT_[84] To KNEE_1_MOTOR_1[89]" --------
*set,_npilot,56399
_npilot407=_npilot
mat,28
real,28
type,28
en,21256,8,56399
csys,31
nrot,56399
csys,0
/com,*********** Create Remote Point "Internal Remote Point 41" ***********
! -------- Remote Point Used by "Fixed - GEAR_SHAFT_MOUNT_1_[134] To KNEE_1_AXLE_1[124]" --------
*set,_npilot,56400
_npilot435=_npilot
mat,37
real,37
type,37
en,21257,10,56400
csys,32
nrot,56400
csys,0
/com,*********** Create Remote Point "Internal Remote Point 42" ***********
! -------- Remote Point Used by "Fixed - GEAR_SHAFT_MOUNT_1_[134] To KNEE_1_AXLE_1[124]" --------
*set,_npilot,56401
_npilot436=_npilot
mat,29
real,29
type,29
en,21258,6,56401
csys,32
nrot,56401
csys,0
/com,*********** Create Joint "Fixed - Ground To ALUMINIUM_EXT[77]" ***********
d,56361,all                   ! body to ground Direct D
/com,*********** Create Joint "Fixed - ALUMINIUM_EXT[77] To MOTOR_MOUNT_[84]" ***********
! Joint Element Type Declaration and Definition using CONTACT
*set,tid,39
*set,cid,39
et,tid,170
keyo,tid,2,1           ! Set MPC target element and not fix pilot
keyo,tid,4,0           ! Create CE's for all DOFs
mat,cid
real,cid
type,tid
tshape,pilo
en,15777,56362        ! create pilot node for rigid link
tshape
type,cid
en,21259,56362,56363      ! body to body joint
csys,0
/com,*********** Create Joint "Revolute - KNEE_1_MOTOR_1[89] To GEAR_FINAL_1_[224]" ***********
! Joint Element Type Declaration and Definition using MPC184
*set,_jid,40
et,_jid,184
keyo,_jid,1,6           ! Revolute Joint
keyo,_jid,4,1           ! Z Axis is revolute axis
sectype,_jid, joint, revo, _wbjoint
secjoint,,14,14
mat,_jid
real,_jid
type,_jid
secnum,_jid
en,15780,56364,56365      ! body to body joint
/com,*********** Create Joint "Revolute - KNEE_1_AXLE_1[124] To GEAR_FINAL_1_[233]" ***********
! Joint Element Type Declaration and Definition using MPC184
*set,_jid,41
et,_jid,184
keyo,_jid,1,6           ! Revolute Joint
keyo,_jid,4,1           ! Z Axis is revolute axis
sectype,_jid, joint, revo, _wbjoint
secjoint,,15,15
mat,_jid
real,_jid
type,_jid
secnum,_jid
en,15783,56366,56367      ! body to body joint
/com,*********** Create Joint "Revolute - KNEE_1_AXLE_1[124] To GEAR_FINAL_2_[230]" ***********
! Joint Element Type Declaration and Definition using MPC184
*set,_jid,42
et,_jid,184
keyo,_jid,1,6           ! Revolute Joint
keyo,_jid,4,1           ! Z Axis is revolute axis
sectype,_jid, joint, revo, _wbjoint
secjoint,,16,16
mat,_jid
real,_jid
type,_jid
secnum,_jid
en,15786,56368,56369      ! body to body joint
/com,*********** Create Joint "Revolute - KNEE_AXLE_1[51] To GEAR_FINAL_2_[236]" ***********
! Joint Element Type Declaration and Definition using MPC184
*set,_jid,43
et,_jid,184
keyo,_jid,1,6           ! Revolute Joint
keyo,_jid,4,1           ! Z Axis is revolute axis
sectype,_jid, joint, revo, _wbjoint
secjoint,,17,17
mat,_jid
real,_jid
type,_jid
secnum,_jid
en,15789,56370,56371      ! body to body joint
/com,*********** Create Joint "Revolute - KNEE_1_BEARING_1[243] To KNEE_LOWER_1[239]" ***********
! Joint Element Type Declaration and Definition using MPC184
*set,_jid,44
et,_jid,184
keyo,_jid,1,6           ! Revolute Joint
keyo,_jid,4,1           ! Z Axis is revolute axis
sectype,_jid, joint, revo, _wbjoint
secjoint,,18,18
mat,_jid
real,_jid
type,_jid
secnum,_jid
en,15792,56372,56373      ! body to body joint
/com,*********** Create Joint "Revolute - KNEE_1_BEARING_1[64] To KNEE_1_UPPER_1[40]" ***********
! Joint Element Type Declaration and Definition using MPC184
*set,_jid,45
et,_jid,184
keyo,_jid,1,6           ! Revolute Joint
keyo,_jid,4,1           ! Z Axis is revolute axis
sectype,_jid, joint, revo, _wbjoint
secjoint,,19,19
mat,_jid
real,_jid
type,_jid
secnum,_jid
en,15795,56374,56375      ! body to body joint
/com,*********** Create Joint "Revolute - KNEE_1_BEARING_1[63] To KNEE_1_UPPER_1[40]" ***********
! Joint Element Type Declaration and Definition using MPC184
*set,_jid,46
et,_jid,184
keyo,_jid,1,6           ! Revolute Joint
keyo,_jid,4,1           ! Z Axis is revolute axis
sectype,_jid, joint, revo, _wbjoint
secjoint,,20,20
mat,_jid
real,_jid
type,_jid
secnum,_jid
en,15798,56376,56377      ! body to body joint
/com,*********** Create Joint "Revolute - KNEE_1_BEARING_1[246] To KNEE_LOWER_1[239]" ***********
! Joint Element Type Declaration and Definition using MPC184
*set,_jid,47
et,_jid,184
keyo,_jid,1,6           ! Revolute Joint
keyo,_jid,4,1           ! Z Axis is revolute axis
sectype,_jid, joint, revo, _wbjoint
secjoint,,21,21
mat,_jid
real,_jid
type,_jid
secnum,_jid
en,15801,56378,56379      ! body to body joint
/com,*********** Create Joint "Fixed - GEAR_FINAL_2_[236] To KNEE_LOWER_1[239]" ***********
! Joint Element Type Declaration and Definition using CONTACT
*set,tid,48
*set,cid,48
et,tid,170
keyo,tid,2,1           ! Set MPC target element and not fix pilot
keyo,tid,4,0           ! Create CE's for all DOFs
mat,cid
real,cid
type,tid
tshape,pilo
en,15804,56380        ! create pilot node for rigid link
tshape
type,cid
en,21260,56380,56381      ! body to body joint
csys,0
/com,*********** Create Joint "Fixed - GEAR_FINAL_1_[233] To GEAR_FINAL_2_[230]" ***********
! Joint Element Type Declaration and Definition using CONTACT
*set,tid,49
*set,cid,49
et,tid,170
keyo,tid,2,1           ! Set MPC target element and not fix pilot
keyo,tid,4,0           ! Create CE's for all DOFs
mat,cid
real,cid
type,tid
tshape,pilo
en,15807,56382        ! create pilot node for rigid link
tshape
type,cid
en,21261,56382,56383      ! body to body joint
csys,0
/com,*********** Create Joint "Fixed - ALUMINIUM_EXT[77] To GEAR_SHAFT_MOUNT_1_[134]" ***********
! Joint Element Type Declaration and Definition using CONTACT
*set,tid,50
*set,cid,50
et,tid,170
keyo,tid,2,1           ! Set MPC target element and not fix pilot
keyo,tid,4,0           ! Create CE's for all DOFs
mat,cid
real,cid
type,tid
tshape,pilo
en,15810,56384        ! create pilot node for rigid link
tshape
type,cid
en,21262,56384,56385      ! body to body joint
csys,0
/com,*********** Create Joint "Fixed - ALUMINIUM_EXT[77] To KNEE_1_UPPER_1[40]" ***********
! Joint Element Type Declaration and Definition using CONTACT
*set,tid,51
*set,cid,51
et,tid,170
keyo,tid,2,1           ! Set MPC target element and not fix pilot
keyo,tid,4,0           ! Create CE's for all DOFs
mat,cid
real,cid
type,tid
tshape,pilo
en,15813,56386        ! create pilot node for rigid link
tshape
type,cid
en,21263,56386,56387      ! body to body joint
csys,0
/com,*********** Create Joint "Fixed - KNEE_AXLE_1[51] To KNEE_1_BEARING_1[63]" ***********
! Joint Element Type Declaration and Definition using CONTACT
*set,tid,52
*set,cid,52
et,tid,170
keyo,tid,2,1           ! Set MPC target element and not fix pilot
keyo,tid,4,0           ! Create CE's for all DOFs
mat,cid
real,cid
type,tid
tshape,pilo
en,15816,56388        ! create pilot node for rigid link
tshape
type,cid
en,21264,56388,56389      ! body to body joint
csys,0
/com,*********** Create Joint "Fixed - KNEE_AXLE_1[51] To KNEE_1_BEARING_1[64]" ***********
! Joint Element Type Declaration and Definition using CONTACT
*set,tid,53
*set,cid,53
et,tid,170
keyo,tid,2,1           ! Set MPC target element and not fix pilot
keyo,tid,4,0           ! Create CE's for all DOFs
mat,cid
real,cid
type,tid
tshape,pilo
en,15819,56390        ! create pilot node for rigid link
tshape
type,cid
en,21265,56390,56391      ! body to body joint
csys,0
/com,*********** Create Joint "Fixed - KNEE_AXLE_1[51] To KNEE_1_BEARING_1[243]" ***********
! Joint Element Type Declaration and Definition using CONTACT
*set,tid,54
*set,cid,54
et,tid,170
keyo,tid,2,1           ! Set MPC target element and not fix pilot
keyo,tid,4,0           ! Create CE's for all DOFs
mat,cid
real,cid
type,tid
tshape,pilo
en,15822,56392        ! create pilot node for rigid link
tshape
type,cid
en,21266,56392,56393      ! body to body joint
csys,0
/com,*********** Create Joint "Fixed - KNEE_AXLE_1[51] To KNEE_1_BEARING_1[246]" ***********
! Joint Element Type Declaration and Definition using CONTACT
*set,tid,55
*set,cid,55
et,tid,170
keyo,tid,2,1           ! Set MPC target element and not fix pilot
keyo,tid,4,0           ! Create CE's for all DOFs
mat,cid
real,cid
type,tid
tshape,pilo
en,15825,56394        ! create pilot node for rigid link
tshape
type,cid
en,21267,56394,56395      ! body to body joint
csys,0
/com,*********** Create Joint "Fixed - MOTOR_MOUNT_[84] To MOTOR_MOUNT_EXT_[109]" ***********
! Joint Element Type Declaration and Definition using CONTACT
*set,tid,56
*set,cid,56
et,tid,170
keyo,tid,2,1           ! Set MPC target element and not fix pilot
keyo,tid,4,0           ! Create CE's for all DOFs
mat,cid
real,cid
type,tid
tshape,pilo
en,15828,56396        ! create pilot node for rigid link
tshape
type,cid
en,21268,56396,56397      ! body to body joint
csys,0
/com,*********** Create Joint "Fixed - MOTOR_MOUNT_[84] To KNEE_1_MOTOR_1[89]" ***********
! Joint Element Type Declaration and Definition using CONTACT
*set,tid,57
*set,cid,57
et,tid,170
keyo,tid,2,1           ! Set MPC target element and not fix pilot
keyo,tid,4,0           ! Create CE's for all DOFs
mat,cid
real,cid
type,tid
tshape,pilo
en,15831,56398        ! create pilot node for rigid link
tshape
type,cid
en,21269,56398,56399      ! body to body joint
csys,0
/com,*********** Create Joint "Fixed - GEAR_SHAFT_MOUNT_1_[134] To KNEE_1_AXLE_1[124]" ***********
! Joint Element Type Declaration and Definition using CONTACT
*set,tid,58
*set,cid,58
et,tid,170
keyo,tid,2,1           ! Set MPC target element and not fix pilot
keyo,tid,4,0           ! Create CE's for all DOFs
mat,cid
real,cid
type,tid
tshape,pilo
en,15834,56400        ! create pilot node for rigid link
tshape
type,cid
en,21270,56400,56401      ! body to body joint
csys,0
/com,*********** Create Joint Drivers **********

*DIM,_loadvari306,TABLE,9,1,1,TIME,
! Time values
_loadvari306(1,0,1) = 0.
_loadvari306(2,0,1) = 1.
_loadvari306(3,0,1) = 2.
_loadvari306(4,0,1) = 3.
_loadvari306(5,0,1) = 4.
_loadvari306(6,0,1) = 5.
_loadvari306(7,0,1) = 6.
_loadvari306(8,0,1) = 7.
_loadvari306(9,0,1) = 20.
! Load values
_loadvari306(1,1,1) = 0.
_loadvari306(2,1,1) = 5.23598775598299e-002
_loadvari306(3,1,1) = 0.10471975511966
_loadvari306(4,1,1) = 0.15707963267949
_loadvari306(5,1,1) = 0.20943951023932
_loadvari306(6,1,1) = 0.261799387799149
_loadvari306(7,1,1) = 0.314159265358979
_loadvari306(8,1,1) = 0.366519142918809
_loadvari306(9,1,1) = 1.0471975511966

fini
/com,****************************************************************************
/com,*************************    SOLUTION       ********************************
/com,****************************************************************************
/solu
antype,4                   ! transient analysis
nlgeom,on                  ! Turn on Large Deformation Effects
kbc,1                      ! stepped BC's
eqsl,sparse,,,,,1
cntr,print,1               ! print out contact info and also make no initial contact an error
dmpoption,emat,no             ! Don't combine emat file for DANSYS
dmpoption,esav,no             ! Don't combine esav file for DANSYS
trnopt,full,,,,,hht        ! HHT time integration method
tintp,0.1 ! Numerical Damping
nldiag,cont,iter           ! print out contact info each equilibrium iteration
rescontrol,define,last,last,,dele	   ! Program Controlled
/com,****************************************************
/com,******************* SOLVE FOR LS 1 OF 20 ****************
esel,s,type,,40
dj,all,rotz,%_loadvari306%
esel,all
autots,off                 ! User turned off automatic time stepping
deltim,1.,1.,1.
time,1.
timint,on                  ! Turn on time integration effects
outres,erase
outres,all,none
outres,nsol,all,
outres,rsol,all
outres,nload,all,
outres,strs,all,
outres,epel,all,
outres,eppl,all,
outres,v,all,
outres,a,all,
esel,s,type,,1
esel,a,type,,2,17
esel,a,type,,40,47
cm,_elmisc,elem
esel,all
outres,misc,all,_elmisc
stabilize,off                   ! Stabilization turned OFF by user
! *********** WB SOLVE COMMAND ***********
! check interactive state
*get,ANSINTER_,active,,int
*if,ANSINTER_,ne,0,then
/eof
*endif
solve
/com *************** Write FE CONNECTORS *********
CEWRITE,file,ce,,INTE
/com,****************************************************
/com,*************** FINISHED SOLVE FOR LS 1 *************
/com,****************************************************
/com,******************* SOLVE FOR LS 2 OF 20 ****************
autots,off                 ! User turned off automatic time stepping
deltim,1.,1.,1.
time,2.
timint,on                  ! Turn on time integration effects
outres,erase
outres,all,none
outres,nsol,all,
outres,rsol,all
outres,nload,all,
outres,strs,all,
outres,epel,all,
outres,eppl,all,
outres,v,all,
outres,a,all,
outres,misc,all,_elmisc
stabilize,off                   ! Stabilization turned OFF by user
solve
/com,****************************************************
/com,*************** FINISHED SOLVE FOR LS 2 *************
/com,****************************************************
/com,******************* SOLVE FOR LS 3 OF 20 ****************
autots,off                 ! User turned off automatic time stepping
deltim,1.,1.,1.
time,3.
timint,on                  ! Turn on time integration effects
outres,erase
outres,all,none
outres,nsol,all,
outres,rsol,all
outres,nload,all,
outres,strs,all,
outres,epel,all,
outres,eppl,all,
outres,v,all,
outres,a,all,
outres,misc,all,_elmisc
stabilize,off                   ! Stabilization turned OFF by user
solve
/com,****************************************************
/com,*************** FINISHED SOLVE FOR LS 3 *************
/com,****************************************************
/com,******************* SOLVE FOR LS 4 OF 20 ****************
autots,off                 ! User turned off automatic time stepping
deltim,1.,1.,1.
time,4.
timint,on                  ! Turn on time integration effects
outres,erase
outres,all,none
outres,nsol,all,
outres,rsol,all
outres,nload,all,
outres,strs,all,
outres,epel,all,
outres,eppl,all,
outres,v,all,
outres,a,all,
outres,misc,all,_elmisc
stabilize,off                   ! Stabilization turned OFF by user
solve
/com,****************************************************
/com,*************** FINISHED SOLVE FOR LS 4 *************
/com,****************************************************
/com,******************* SOLVE FOR LS 5 OF 20 ****************
autots,off                 ! User turned off automatic time stepping
deltim,1.,1.,1.
time,5.
timint,on                  ! Turn on time integration effects
outres,erase
outres,all,none
outres,nsol,all,
outres,rsol,all
outres,nload,all,
outres,strs,all,
outres,epel,all,
outres,eppl,all,
outres,v,all,
outres,a,all,
outres,misc,all,_elmisc
stabilize,off                   ! Stabilization turned OFF by user
solve
/com,****************************************************
/com,*************** FINISHED SOLVE FOR LS 5 *************
/com,****************************************************
/com,******************* SOLVE FOR LS 6 OF 20 ****************
autots,off                 ! User turned off automatic time stepping
deltim,1.,1.,1.
time,6.
timint,on                  ! Turn on time integration effects
outres,erase
outres,all,none
outres,nsol,all,
outres,rsol,all
outres,nload,all,
outres,strs,all,
outres,epel,all,
outres,eppl,all,
outres,v,all,
outres,a,all,
outres,misc,all,_elmisc
stabilize,off                   ! Stabilization turned OFF by user
solve
/com,****************************************************
/com,*************** FINISHED SOLVE FOR LS 6 *************
/com,****************************************************
/com,******************* SOLVE FOR LS 7 OF 20 ****************
autots,off                 ! User turned off automatic time stepping
deltim,1.,1.,1.
time,7.
timint,on                  ! Turn on time integration effects
outres,erase
outres,all,none
outres,nsol,all,
outres,rsol,all
outres,nload,all,
outres,strs,all,
outres,epel,all,
outres,eppl,all,
outres,v,all,
outres,a,all,
outres,misc,all,_elmisc
stabilize,off                   ! Stabilization turned OFF by user
solve
/com,****************************************************
/com,*************** FINISHED SOLVE FOR LS 7 *************
/com,****************************************************
/com,******************* SOLVE FOR LS 8 OF 20 ****************
autots,off                 ! User turned off automatic time stepping
deltim,1.,1.,1.
time,8.
timint,on                  ! Turn on time integration effects
outres,erase
outres,all,none
outres,nsol,all,
outres,rsol,all
outres,nload,all,
outres,strs,all,
outres,epel,all,
outres,eppl,all,
outres,v,all,
outres,a,all,
outres,misc,all,_elmisc
stabilize,off                   ! Stabilization turned OFF by user
solve
/com,****************************************************
/com,*************** FINISHED SOLVE FOR LS 8 *************
/com,****************************************************
/com,******************* SOLVE FOR LS 9 OF 20 ****************
autots,off                 ! User turned off automatic time stepping
deltim,1.,1.,1.
time,9.
timint,on                  ! Turn on time integration effects
outres,erase
outres,all,none
outres,nsol,all,
outres,rsol,all
outres,nload,all,
outres,strs,all,
outres,epel,all,
outres,eppl,all,
outres,v,all,
outres,a,all,
outres,misc,all,_elmisc
stabilize,off                   ! Stabilization turned OFF by user
solve
/com,****************************************************
/com,*************** FINISHED SOLVE FOR LS 9 *************
/com,****************************************************
/com,******************* SOLVE FOR LS 10 OF 20 ****************
autots,off                 ! User turned off automatic time stepping
deltim,1.,1.,1.
time,10.
timint,on                  ! Turn on time integration effects
outres,erase
outres,all,none
outres,nsol,all,
outres,rsol,all
outres,nload,all,
outres,strs,all,
outres,epel,all,
outres,eppl,all,
outres,v,all,
outres,a,all,
outres,misc,all,_elmisc
stabilize,off                   ! Stabilization turned OFF by user
solve
/com,****************************************************
/com,*************** FINISHED SOLVE FOR LS 10 *************
/com,****************************************************
/com,******************* SOLVE FOR LS 11 OF 20 ****************
autots,off                 ! User turned off automatic time stepping
deltim,1.,1.,1.
time,11.
timint,on                  ! Turn on time integration effects
outres,erase
outres,all,none
outres,nsol,all,
outres,rsol,all
outres,nload,all,
outres,strs,all,
outres,epel,all,
outres,eppl,all,
outres,v,all,
outres,a,all,
outres,misc,all,_elmisc
stabilize,off                   ! Stabilization turned OFF by user
solve
/com,****************************************************
/com,*************** FINISHED SOLVE FOR LS 11 *************
/com,****************************************************
/com,******************* SOLVE FOR LS 12 OF 20 ****************
autots,off                 ! User turned off automatic time stepping
deltim,1.,1.,1.
time,12.
timint,on                  ! Turn on time integration effects
outres,erase
outres,all,none
outres,nsol,all,
outres,rsol,all
outres,nload,all,
outres,strs,all,
outres,epel,all,
outres,eppl,all,
outres,v,all,
outres,a,all,
outres,misc,all,_elmisc
stabilize,off                   ! Stabilization turned OFF by user
solve
/com,****************************************************
/com,*************** FINISHED SOLVE FOR LS 12 *************
/com,****************************************************
/com,******************* SOLVE FOR LS 13 OF 20 ****************
autots,off                 ! User turned off automatic time stepping
deltim,1.,1.,1.
time,13.
timint,on                  ! Turn on time integration effects
outres,erase
outres,all,none
outres,nsol,all,
outres,rsol,all
outres,nload,all,
outres,strs,all,
outres,epel,all,
outres,eppl,all,
outres,v,all,
outres,a,all,
outres,misc,all,_elmisc
stabilize,off                   ! Stabilization turned OFF by user
solve
/com,****************************************************
/com,*************** FINISHED SOLVE FOR LS 13 *************
/com,****************************************************
/com,******************* SOLVE FOR LS 14 OF 20 ****************
autots,off                 ! User turned off automatic time stepping
deltim,1.,1.,1.
time,14.
timint,on                  ! Turn on time integration effects
outres,erase
outres,all,none
outres,nsol,all,
outres,rsol,all
outres,nload,all,
outres,strs,all,
outres,epel,all,
outres,eppl,all,
outres,v,all,
outres,a,all,
outres,misc,all,_elmisc
stabilize,off                   ! Stabilization turned OFF by user
solve
/com,****************************************************
/com,*************** FINISHED SOLVE FOR LS 14 *************
/com,****************************************************
/com,******************* SOLVE FOR LS 15 OF 20 ****************
autots,off                 ! User turned off automatic time stepping
deltim,1.,1.,1.
time,15.
timint,on                  ! Turn on time integration effects
outres,erase
outres,all,none
outres,nsol,all,
outres,rsol,all
outres,nload,all,
outres,strs,all,
outres,epel,all,
outres,eppl,all,
outres,v,all,
outres,a,all,
outres,misc,all,_elmisc
stabilize,off                   ! Stabilization turned OFF by user
solve
/com,****************************************************
/com,*************** FINISHED SOLVE FOR LS 15 *************
/com,****************************************************
/com,******************* SOLVE FOR LS 16 OF 20 ****************
autots,off                 ! User turned off automatic time stepping
deltim,1.,1.,1.
time,16.
timint,on                  ! Turn on time integration effects
outres,erase
outres,all,none
outres,nsol,all,
outres,rsol,all
outres,nload,all,
outres,strs,all,
outres,epel,all,
outres,eppl,all,
outres,v,all,
outres,a,all,
outres,misc,all,_elmisc
stabilize,off                   ! Stabilization turned OFF by user
solve
/com,****************************************************
/com,*************** FINISHED SOLVE FOR LS 16 *************
/com,****************************************************
/com,******************* SOLVE FOR LS 17 OF 20 ****************
autots,off                 ! User turned off automatic time stepping
deltim,1.,1.,1.
time,17.
timint,on                  ! Turn on time integration effects
outres,erase
outres,all,none
outres,nsol,all,
outres,rsol,all
outres,nload,all,
outres,strs,all,
outres,epel,all,
outres,eppl,all,
outres,v,all,
outres,a,all,
outres,misc,all,_elmisc
stabilize,off                   ! Stabilization turned OFF by user
solve
/com,****************************************************
/com,*************** FINISHED SOLVE FOR LS 17 *************
/com,****************************************************
/com,******************* SOLVE FOR LS 18 OF 20 ****************
autots,off                 ! User turned off automatic time stepping
deltim,1.,1.,1.
time,18.
timint,on                  ! Turn on time integration effects
outres,erase
outres,all,none
outres,nsol,all,
outres,rsol,all
outres,nload,all,
outres,strs,all,
outres,epel,all,
outres,eppl,all,
outres,v,all,
outres,a,all,
outres,misc,all,_elmisc
stabilize,off                   ! Stabilization turned OFF by user
solve
/com,****************************************************
/com,*************** FINISHED SOLVE FOR LS 18 *************
/com,****************************************************
/com,******************* SOLVE FOR LS 19 OF 20 ****************
autots,off                 ! User turned off automatic time stepping
deltim,1.,1.,1.
time,19.
timint,on                  ! Turn on time integration effects
outres,erase
outres,all,none
outres,nsol,all,
outres,rsol,all
outres,nload,all,
outres,strs,all,
outres,epel,all,
outres,eppl,all,
outres,v,all,
outres,a,all,
outres,misc,all,_elmisc
stabilize,off                   ! Stabilization turned OFF by user
solve
/com,****************************************************
/com,*************** FINISHED SOLVE FOR LS 19 *************
/com,****************************************************
/com,******************* SOLVE FOR LS 20 OF 20 ****************
autots,off                 ! User turned off automatic time stepping
deltim,1.,1.,1.
time,20.
timint,on                  ! Turn on time integration effects
outres,erase
outres,all,none
outres,nsol,all,
outres,rsol,all
outres,nload,all,
outres,strs,all,
outres,epel,all,
outres,eppl,all,
outres,v,all,
outres,a,all,
outres,misc,all,_elmisc
stabilize,off                   ! Stabilization turned OFF by user
solve
/com,****************************************************
/com,*************** FINISHED SOLVE FOR LS 20 *************
/post1
fini
